# OpenSim document version 30000
Model AshbyModel:
  length_units: meters
  force_units: N
  gravity: 0 -9.80665 0
  credits:
    Frank Anderson, Peter Loan, Ayman Habib, Ajay Seth, Michael Sherman
  BodySet:
    Body ground: mass=0 mass_center=(0 0 0) inertia_xx=1 inertia_yy=1 inertia_zz=1
    Body torso: mass=33.4 mass_center=(0 -0.179 0) inertia_xx=1.887 inertia_yy=1.887 inertia_zz=1.887 meshes=sphere.vtp
      PlanarJoint torsoToGround: parent_body=ground location_in_parent=(0 0 0) location=(0 0 0)
        Coordinate torso_rz: motion_type=rotational default_value=-0.1527181
        Coordinate torso_tx: motion_type=translational default_value=0.002507179
        Coordinate torso_ty: motion_type=translational default_value=1.366031
    Body thigh: mass=20.7 mass_center=(0 -0.185 0) inertia_xx=0.361 inertia_yy=0.361 inertia_zz=0.361 meshes=sphere.vtp
      PinJoint hip: parent_body=torso location_in_parent=(0 -0.514 0) location=(0 0 0)
        Coordinate hip_flexion: motion_type=rotational default_value=0.1700261 range=(-0.1745329 2.094395)
            clamped=false
    Body shank: mass=7.3 mass_center=(0 -0.189 0) inertia_xx=0.106 inertia_yy=0.106 inertia_zz=0.106 meshes=sphere.vtp
      PinJoint knee: parent_body=thigh location_in_parent=(0 -0.427 0) orientation_in_parent=(3.141593 0 0)
          location=(0 0 0) orientation=(3.141593 0 0)
        Coordinate knee_flexion: motion_type=rotational default_value=0.1821379 range=(-0.1745329 2.094395)
    Body foot: mass=2 mass_center=(0.028 0 0) inertia_xx=0.012 inertia_yy=0.012 inertia_zz=0.012 meshes=sphere.vtp
      PinJoint ankle: parent_body=shank location_in_parent=(0 -0.437 0) location=(0 0 0)
        Coordinate ankle_flexion: motion_type=rotational default_value=0.16483 range=(-0.9599311 0.3490659)
    Body arm: mass=5.4 mass_center=(0 -0.131 0) inertia_xx=0.033 inertia_yy=0.033 inertia_zz=0.033 meshes=sphere.vtp
      PinJoint shoulder: parent_body=torso location_in_parent=(0 0 0) location=(0 0 0)
        Coordinate shoulder_flexion: motion_type=rotational default_value=-1.335474e-15 range=(-0.7853982 3.141593)
    Body forearm: mass=3.5 mass_center=(0 -0.183 0) inertia_xx=0.103 inertia_yy=0.103 inertia_zz=0.103
        meshes=sphere.vtp
      PinJoint elbow: parent_body=arm location_in_parent=(0 -0.3 0) location=(0 0 0)
        Coordinate elbow_flexion: motion_type=rotational default_value=0.715585 locked=true
  ConstraintSet:
    PointConstraint toeConstraint: body_1=ground body_2=foot location_body_1=(0 0 0) location_body_2=(0.14 0 0)
    PointConstraint heelConstraint: body_1=ground body_2=foot location_body_1=(-0.14 0 0) location_body_2=(0 0 0)
  ForceSet:
    CoordinateLimitForce ankle_flexion_LimitForce: coordinate=ankle_flexion upper_stiffness=20 [N*m/degree]
        upper_limit=20 [degrees] lower_stiffness=20 [N*m/degree] lower_limit=-55 [degrees] damping=0.25
        transition=5 [degrees] compute_dissipation_energy=false
    CoordinateLimitForce knee_flexion_LimitForce: coordinate=knee_flexion upper_stiffness=20 upper_limit=140
        lower_stiffness=20 lower_limit=0 damping=0.25 transition=5 compute_dissipation_energy=false
    CoordinateLimitForce hip_flexion_LimitForce: coordinate=hip_flexion upper_stiffness=20 upper_limit=120
        lower_stiffness=20 lower_limit=-10 damping=0.25 transition=5 compute_dissipation_energy=false
    CoordinateLimitForce shoulder_flexion_LimitForce: coordinate=shoulder_flexion upper_stiffness=20 upper_limit=180
        lower_stiffness=20 lower_limit=-45 damping=0.25 transition=5 compute_dissipation_energy=false
    MuscleLikeCoordinateActuator ankle_MLCA: coordinate=ankle_flexion optimal_force=1 qdot_max=16
      pos_force_vs_coordinate_function: PolynomialFunction: coefficients=(-80.378 -173.56 -102.12 91.211)
      neg_force_vs_coordinate_function: PolynomialFunction: coefficients=(-748.14 -1054.1 38.366 407.2)
    MuscleLikeCoordinateActuator knee_MLCA: coordinate=knee_flexion optimal_force=1 qdot_max=18
      pos_force_vs_coordinate_function: PolynomialFunction: coefficients=(11.285 -135.23 282.53 238.77)
      neg_force_vs_coordinate_function: PolynomialFunction: coefficients=(69.248 -454.99 712.19 203.07)
    MuscleLikeCoordinateActuator hip_MLCA: coordinate=hip_flexion optimal_force=1 qdot_max=20
      pos_force_vs_coordinate_function: PolynomialFunction: coefficients=(27.175 -163.26 146.58 203.88)
      neg_force_vs_coordinate_function: PolynomialFunction: coefficients=(-15.492 0.99992 188.07 326.63)
    MuscleLikeCoordinateActuator shoulder_MLCA: coordinate=shoulder_flexion optimal_force=1 qdot_max=26
      pos_force_vs_coordinate_function: PolynomialFunction: coefficients=(1.9259 -4.6646 -47.887 246.52)
      neg_force_vs_coordinate_function: PolynomialFunction: coefficients=(1.5135 -29.722 63.765 177.07)
