# OpenSim document version 30000
ControllerSet Controllers:
  MuscleFiberStretchController [values shared by the 9 below unless stated]: gain_length=0.85 gain_velocity=0.85
      normalized_rest_length=1
  MuscleFiberStretchController rightHipExtensorStretchController: actuator_list=(glut_max1_r glut_max2_r glut_max3_r)
  MuscleFiberStretchController rightHipFlexorStretchController: actuator_list=(iliacus_r psoas_r sar_r)
  MuscleFiberStretchController rightHipAdductorStretchController: actuator_list=(add_brev_r add_long_r add_mag1_r add_mag2_r add_mag3_r grac_r pect_r)
  MuscleFiberStretchController rightHipAbductorStretchController: actuator_list=(glut_med1_r glut_med2_r glut_med3_r glut_min1_r glut_min2_r glut_min3_r tfl_r peri_r)
  MuscleFiberStretchController rightKneeExtensorStretchController: actuator_list=(rect_fem_r vas_int_r vas_lat_r vas_med_r)
  MuscleFiberStretchController rightKneeFlexorStretchController: actuator_list=(bifemlh_r bifemsh_r sar_r semimem_r semiten_r)
  MuscleFiberStretchController rightPlantarFlexorStretchController: actuator_list=(lat_gas_r med_gas_r soleus_r)
  MuscleFiberStretchController rightDorsiflexorStretchController: actuator_list=tib_ant_r
  MuscleFiberStretchController OtherStretchController: actuator_list=(quad_fem_r gem_r ercspn_r ercspn_l intobl_r intobl_l extobl_r extobl_l)
