# OpenSim document version 30000
ControllerSet Controllers:
  MuscleFiberStretchController rightHipExtensorStretchController: actuator_list=(glut_max1_r glut_max2_r glut_max3_r)
      gain_length=0.1763045 gain_velocity=1.31988 normalized_rest_length=0.8519192
  MuscleFiberStretchController rightHipFlexorStretchController: actuator_list=(iliacus_r psoas_r sar_r)
      gain_length=1.033989 gain_velocity=0.1770008 normalized_rest_length=1.394807
  MuscleFiberStretchController rightHipAdductorStretchController: actuator_list=(add_brev_r add_long_r add_mag1_r add_mag2_r add_mag3_r grac_r pect_r)
      gain_length=0.2485042 gain_velocity=1.901745 normalized_rest_length=1.307766
  MuscleFiberStretchController rightHipAbductorStretchController: actuator_list=(glut_med1_r glut_med2_r glut_med3_r glut_min1_r glut_min2_r glut_min3_r tfl_r peri_r)
      gain_length=0.1512209 gain_velocity=0.003390899 normalized_rest_length=0.9718587
  MuscleFiberStretchController rightKneeExtensorStretchController: actuator_list=(rect_fem_r vas_int_r vas_lat_r vas_med_r)
      gain_length=0.3356937 gain_velocity=0.1529443 normalized_rest_length=0.7754889
  MuscleFiberStretchController rightKneeFlexorStretchController: actuator_list=(bifemlh_r bifemsh_r sar_r semimem_r semiten_r)
      gain_length=0.2513772 gain_velocity=0.5661483 normalized_rest_length=1.08009
  MuscleFiberStretchController rightPlantarFlexorStretchController: actuator_list=(lat_gas_r med_gas_r soleus_r)
      gain_length=1.061875 gain_velocity=0.2208489 normalized_rest_length=1.225896
  MuscleFiberStretchController rightDorsiflexorStretchController: actuator_list=tib_ant_r gain_length=0.9721312
      gain_velocity=1.125142 normalized_rest_length=1.026109
  MuscleFiberStretchController OtherStretchController: actuator_list=(quad_fem_r gem_r ercspn_r ercspn_l intobl_r intobl_l extobl_r extobl_l)
      gain_length=0.527523 gain_velocity=0.9939587 normalized_rest_length=1.296375
